#Collapse by Thien Phan

atom_style	sphere
atom_modify	map array
boundary	f f f
newton		off
echo		none
hard_particles yes

communicate	single vel yes
processors	3 2 2

units		si

read_restart restart.packing

neighbor	0.0005 bin
neigh_modify	delay 0

#----------------------------------------Material properties required for new pair styles---------------------------------------

fix 	m1 all property/global youngsModulus peratomtype 6.7e6 6.7e6  6.7e6          # units Pa
fix 	m2 all property/global poissonsRatio peratomtype 0.15 0.15 0.15									# not effect much
fix 	m3 all property/global coefficientRestitution peratomtypepair 3				0.9 0.9 0.9		0.9 0.9 0.9		0.9 0.9 0.9		# not effect much
fix 	m4 all property/global coefficientFriction peratomtypepair 3				0.57 0.57 0.0		0.57 0.57 0.0		0.0 0.0 0.0		# sliding friction
fix     m5 all property/global minSeparationDistanceRatio scalar 1.01
fix     m6 all property/global maxSeparationDistanceRatio scalar 1.1
fix     m7 all property/global surfaceLiquidContentInitial scalar 1
fix     m8 all property/global surfaceTension scalar 0.071
fix     m9 all property/global fluidViscosity scalar 0.001
fix     m10 all property/global contactAngle peratomtype 47 47 47

pair_style 	gran model hertz tangential history cohesion easo/capillary/viscous

pair_coeff	* *

#---------------------------------------------------------------------------------------------------------------------------------

variable dt equal 5e-6
timestep  ${dt}

fix			gravi all gravity 9.81 vector 0.0 -1.0 0.0

fix 	ts_check all check/timestep/gran 10000 0.2 0.2


# --------------- output settings, include total thermal energy -----------------------------------------#

thermo_style		custom step atoms ke time cu elapsed
thermo			10000
thermo_modify		lost ignore norm no
compute_modify		thermo_temp dynamic yes

# ----------------------------------------- Insert meshes --------------------------------------------------#


fix z1wall all mesh/surface/stress file mesh/z2.stl type 3  reference_point 0.0 0.0 0.0
fix z2wall all mesh/surface/stress file mesh/z1.stl type 3  reference_point 0.0 0.0 0.06
fix y1wall all mesh/surface/stress file mesh/y1.stl type 2 reference_point 0.0 0.0 0.0
fix y2wall all mesh/surface/stress file mesh/y2.stl type 2 reference_point 0.0 0.15 0.0
fix y2samplewall all mesh/surface/stress file mesh/y2sample.stl type 3 reference_point 0.0 0.048 0.0
fix x1wall all mesh/surface/stress file mesh/x1.stl type 2 reference_point 0.0 0.0 0.0
fix x2wall all mesh/surface/stress file mesh/x2.stl type 2 reference_point 0.3 0.0 0.0
fix x2samplewall all mesh/surface/stress file mesh/x2sample.stl type 3 reference_point 0.06 0.0 0.0

fix wall all wall/gran model hertz tangential history mesh n_meshes 6 meshes z1wall z2wall y1wall y2wall x1wall x2wall


# ------- apply nve integration to all particles that are inserted as single particles-------------------#

fix		integr all nve/sphere

#------------------- Write data -----------------------------------------------------#
dump		dmp1 all custom 1 clay100/post2/dump*.liggghts id type type x y z ix iy iz vx vy vz fx fy fz omegax omegay omegaz radius
run 1
undump	dmp1

dump		dmp1 all custom 500 clay100/post/dump*.liggghts id type type x y z ix iy iz vx vy vz fx fy fz omegax omegay omegaz radius

#----------------------consolidation-------------------------------------------------#

run 250000

write_restart restart.initiate
